# 3d Lennard-Jones melt - simple test input

# Use Kokkos suffix for accelerated styles
suffix          kk

units           lj
atom_style      atomic/kk

lattice         fcc 0.8442
region          box block 0 10 0 10 0 10
create_box      1 box
run_style       verlet/kk
create_atoms    1 box
mass            1 1.0

velocity        all create 1.44 87287 loop geom

pair_style      lj/cut 2.5
pair_coeff      1 1 1.0 1.0 2.5

neighbor        0.3 bin
neigh_modify    delay 0 every 20 check no

fix             1 all nve

thermo          50
run             1000
